# OpenSim document version 30000
Model EyeHead_v2.4:
  credits: Julie Iskander, Mo Hossny
  length_units: meters
  force_units: N
  gravity: 0 -9.80665 0
  publications:
    Version 2, An ocular biomechanic model for dynamic simulation of different eye movements, Journal of Biomechanics, 2018
  BodySet:
    Body ground: mass=0 mass_center=(0 0 0) inertia_xx=0 inertia_yy=0 inertia_zz=0 meshes=ground.vtp
    Body skull: mass=3.8 mass_center=(0 0.0676 0) inertia_xx=0.0263498 inertia_yy=0.00809938 inertia_zz=0.028416
        meshes=(skull.vtp jaw.vtp)
      WeldJoint skulljnt: parent_body=ground location_in_parent=(0 0 0) location=(0 0 0)
    Body reye0_skull: mass=0 mass_center=(0 0 0) inertia_xx=0 inertia_yy=0 inertia_zz=0
      WeldJoint reye_skull: parent_body=skull location_in_parent=(0.08 0.05 0.03) location=(0 0 0)
    Body reye1_0: mass=0 mass_center=(0 0 0) inertia_xx=0 inertia_yy=0 inertia_zz=0
      CustomJoint reye0: parent_body=reye0_skull location_in_parent=(0 0 0) location=(0 0 0)
        Coordinate rab_ad_duction: motion_type=rotational default_value=0 range=(-0.6981317 0.6981317) clamped=true
        SpatialTransform: axes_held_at_zero=(rotation2 rotation3 translation1 translation2 translation3)
          TransformAxis rotation1: coordinates=rab_ad_duction axis=(0 1 0) LinearFunction(coefficients=1 0)
    Body reye2_1: mass=0 mass_center=(0 0 0) inertia_xx=0 inertia_yy=0 inertia_zz=0
      CustomJoint reye1: parent_body=reye1_0 location_in_parent=(0 0 0) location=(0 0 0)
        Coordinate rinfra_supra_duction: motion_type=rotational default_value=0 range=(-0.6981317 0.6981317)
            clamped=true
        SpatialTransform: axes_held_at_zero=(rotation2 rotation3 translation1 translation2 translation3)
          TransformAxis rotation1: coordinates=rinfra_supra_duction axis=(0 0 1) LinearFunction(coefficients=1 0)
    Body reye: mass=0.0075 mass_center=(0 0 0) inertia_xx=4.32e-7 inertia_yy=4.32e-7 inertia_zz=4.32e-7 meshes=eyeb.obj
      CustomJoint reye2: parent_body=reye2_1 location_in_parent=(0 0 0) location=(0 0 0)
        Coordinate rin_ex_cyclotorsion: motion_type=rotational default_value=0 range=(-0.6981317 0.6981317)
            clamped=true
        SpatialTransform: axes_held_at_zero=(rotation2 rotation3 translation1 translation2 translation3)
          TransformAxis rotation1: coordinates=rin_ex_cyclotorsion axis=(-1 0 0) LinearFunction(coefficients=1 0)
      WrapSphere reye: translation=(0 0 0) quadrant=all radius=0.012
    Body leye0_skull: mass=0 mass_center=(0 0 0) inertia_xx=0 inertia_yy=0 inertia_zz=0
      WeldJoint leye_skull: parent_body=skull location_in_parent=(0.08 0.05 -0.03) location=(0 0 0)
    Body leye1_0: mass=0 mass_center=(0 0 0) inertia_xx=0 inertia_yy=0 inertia_zz=0
      CustomJoint leye0: parent_body=leye0_skull location_in_parent=(0 0 0) location=(0 0 0)
        Coordinate lab_ad_duction: motion_type=rotational default_value=0 range=(-0.6981317 0.6981317) clamped=false
        SpatialTransform: axes_held_at_zero=(rotation2 rotation3 translation1 translation2 translation3)
          TransformAxis rotation1: coordinates=lab_ad_duction axis=(0 -1 0) LinearFunction(coefficients=1 0)
    Body leye2_1: mass=0 mass_center=(0 0 0) inertia_xx=0 inertia_yy=0 inertia_zz=0
      CustomJoint leye1: parent_body=leye1_0 location_in_parent=(0 0 0) location=(0 0 0)
        Coordinate linfra_supra_duction: motion_type=rotational default_value=0 range=(-0.6981317 0.6981317)
            clamped=false
        SpatialTransform: axes_held_at_zero=(rotation2 rotation3 translation1 translation2 translation3)
          TransformAxis rotation1: coordinates=linfra_supra_duction axis=(0 0 1) LinearFunction(coefficients=1 0)
    Body leye: mass=0.0075 mass_center=(0 0 0) inertia_xx=4.32e-7 inertia_yy=4.32e-7 inertia_zz=4.32e-7 meshes=eyeb.obj
      CustomJoint leye2: parent_body=leye2_1 location_in_parent=(0 0 0) location=(0 0 0)
        Coordinate lin_ex_cyclotorsion: motion_type=rotational default_value=0 range=(-0.6981317 0.6981317)
            clamped=false
        SpatialTransform: axes_held_at_zero=(rotation2 rotation3 translation1 translation2 translation3)
          TransformAxis rotation1: coordinates=lin_ex_cyclotorsion axis=(1 0 0) LinearFunction(coefficients=1 0)
      WrapSphere leye: translation=(0 0 0) quadrant=all radius=0.012
    Body ball: mass=0.25 mass_center=(0 0 0) inertia_xx=0.02 inertia_yy=9.80665 inertia_zz=0.02 meshes=Sphere.obj
      FreeJoint free: parent_body=skull location_in_parent=(0.08 0.05 0) location=(0 0 0)
        Coordinate ball_rx: motion_type=rotational default_value=0 range=(-0.6981317 0.6981317) clamped=true
            locked=true
        Coordinate ball_ry: motion_type=rotational default_value=0 range=(-0.6981317 0.6981317) clamped=true
            locked=true
        Coordinate ball_rz: motion_type=rotational default_value=0 range=(-0.6981317 0.6981317) clamped=true
            locked=true
        Coordinate ball_tx: motion_type=translational default_value=1 range=(0.25 10) clamped=true locked=true
        Coordinate ball_ty: motion_type=translational default_value=0 range=(-2 2) clamped=true locked=true
        Coordinate ball_tz: motion_type=translational default_value=0 range=(-2 2) clamped=true locked=true
  ForceSet:
    Millard2012EquilibriumMuscle [values shared by the 12 below unless stated]: min_control=0.5 max_control=1
        max_contraction_velocity=1000 ignore_tendon_compliance=true fiber_damping=0 default_activation=0.05
        activation_time_constant=0.01 [seconds] deactivation_time_constant=0.04 [seconds] minimum_activation=0.05
      ActiveForceLengthCurve: min_norm_active_fiber_length=0.53 transition_norm_fiber_length=0.93
          max_norm_active_fiber_length=2 shallow_ascending_slope=2.35 minimum_value=0
      ForceVelocityCurve: concentric_slope_at_vmax=0 concentric_slope_near_vmax=0.25 isometric_slope=5
          eccentric_slope_at_vmax=0 eccentric_slope_near_vmax=0.15 max_eccentric_velocity_force_multiplier=1.4
      FiberForceLengthCurve: strain_at_zero_force=-0.199 strain_at_one_norm_force=0.57 stiffness_at_low_force=0.280884
          stiffness_at_one_norm_force=1.56047 curviness=1
      TendonForceLengthCurve
    Millard2012EquilibriumMuscle rLR: max_isometric_force=1.4709 optimal_fiber_length=0.0490277
        tendon_slack_length=0.0084
      PathPoint muscle1-point1: skull (0.046 0.0506 0.017)
      MovingPathPoint Movingpoint: skull (0.0698 0.0503 0.042) x_coordinate=rab_ad_duction y_coordinate=rab_ad_duction
          z_coordinate=rab_ad_duction
        x_location: SimmSpline: x=(-0.698132 0 0.698132) y=(0.06762 0.0698 0.0718)
        y_location: SimmSpline: x=(-0.698132 0 0.698132) y=(0.0501 0.0503 0.0493)
        z_location: SimmSpline: x=(-0.698132 0 0.698132) y=(0.042 0.042 0.0428)
      PathPoint muscle1-point4: reye (0.0065 0 0.01008)
      PathWrap: wrap_object=reye method=hybrid
    Millard2012EquilibriumMuscle rMR: max_isometric_force=1.573863 optimal_fiber_length=0.04106433
        tendon_slack_length=0.0038
      PathPoint muscle2-point1: skull (0.05 0.0506 0.013)
      MovingPathPoint Movingpoint: skull (0.0747 0.05014 0.0152) x_coordinate=rab_ad_duction
          y_coordinate=rab_ad_duction z_coordinate=rab_ad_duction
        x_location: SimmSpline: x=(-0.698132 0 0.698132) y=(0.0787 0.0747 0.0717)
        y_location: SimmSpline: x=(-0.698132 0 0.698132) y=(0.05014 0.05014 0.05014)
        z_location: SimmSpline: x=(-0.698132 0 0.698132) y=(0.0143 0.0152 0.016)
      PathPoint muscle2-point4: reye (0.00884 0 -0.00965)
      PathWrap: wrap_object=reye method=hybrid
    Millard2012EquilibriumMuscle rSR: max_isometric_force=1.17672 optimal_fiber_length=0.04517723
        tendon_slack_length=0.0054
      PathPoint muscle3-point1: skull (0.04824 0.0536 0.014)
      MovingPathPoint Movingpoint: skull (0.0708 0.062 0.028) x_coordinate=rinfra_supra_duction
          y_coordinate=rinfra_supra_duction z_coordinate=rinfra_supra_duction
        x_location: SimmSpline: x=(-0.698132 0 0.698132) y=(0.0728 0.0708 0.0688)
        y_location: SimmSpline: x=(-0.698132 0 0.698132) y=(0.065 0.062 0.06)
        z_location: SimmSpline: x=(-0.698132 0 0.698132) y=(0.028 0.028 0.028)
      PathPoint muscle3-point4: reye (0.00763 0.01048 0)
      PathWrap: wrap_object=reye method=hybrid
    Millard2012EquilibriumMuscle rIR: max_isometric_force=1.426773 optimal_fiber_length=0.04571768
        tendon_slack_length=0.0048
      PathPoint muscle4-point1: skull (0.04824 0.0476 0.014)
      MovingPathPoint Movingpoint: skull (0.0758 0.03735 0.0259) x_coordinate=rinfra_supra_duction
          y_coordinate=rinfra_supra_duction z_coordinate=rinfra_supra_duction
        x_location: SimmSpline: x=(-0.698132 0 0.698132) y=(0.0708 0.0758 0.0798)
        y_location: SimmSpline: x=(-0.698132 0.698132) y=(0.0388 0.0359)
        z_location: SimmSpline: x=(-0.698132 0 0.698132) y=(0.0274 0.0259 0.0244)
      PathPoint muscle4-point4: reye (0.00802 -0.01024 0)
      PathWrap: wrap_object=reye method=hybrid
    Millard2012EquilibriumMuscle rSO: max_isometric_force=0.603069 optimal_fiber_length=0.03982904
        tendon_slack_length=0.0265
      PathPoint muscle5-point_origin: skull (0.05 0.054 0.013)
      PathPoint muscle5-point_trochlear: skull (0.08824 0.06225 0.01473)
      PathPoint muscle5-point4: reye (-0.00441 0.01105 0.0029)
      PathWrap: wrap_object=reye method=hybrid
    Millard2012EquilibriumMuscle rIO: max_isometric_force=0.558942 optimal_fiber_length=0.04147341
        tendon_slack_length=0.0015
      PathPoint muscle6-point1: skull (0.09134 0.03454 0.0189)
      MovingPathPoint Movingpoint: skull (0.07282 0.0364 0.03) x_coordinate=rinfra_supra_duction
          y_coordinate=rinfra_supra_duction z_coordinate=rinfra_supra_duction
        x_location: SimmSpline: x=(-0.698132 0 0.698132) y=(0.07032 0.07282 0.07482)
        y_location: SimmSpline: x=(-0.698132 0 0.698132) y=(0.0357 0.0364 0.0371)
        z_location: SimmSpline: x=(-0.698132 0.698132) y=(0.03 0.03)
      PathPoint muscle6-point4: reye (-0.00718 0 0.0087)
      PathWrap: wrap_object=reye method=hybrid
    Millard2012EquilibriumMuscle lLR: max_isometric_force=1.4709 optimal_fiber_length=0.0490277
        tendon_slack_length=0.0084
      PathPoint muscle7-point1: skull (0.046 0.0506 -0.017)
      MovingPathPoint Movingpoint: skull (0.0698 0.0503 -0.042) x_coordinate=lab_ad_duction y_coordinate=lab_ad_duction
          z_coordinate=lab_ad_duction
        x_location: SimmSpline: x=(-0.698132 0 0.698132) y=(0.06762 0.0698 0.0718)
        y_location: SimmSpline: x=(-0.698132 0 0.698132) y=(0.0501 0.0503 0.0493)
        z_location: SimmSpline: x=(-0.698132 0 0.698132) y=(-0.042 -0.042 -0.0428)
      PathPoint muscle7-point4: leye (0.0065 0 -0.01008)
      PathWrap: wrap_object=leye method=hybrid
    Millard2012EquilibriumMuscle lMR: max_isometric_force=1.573863 optimal_fiber_length=0.04106433
        tendon_slack_length=0.0038
      PathPoint muscle8-point1: skull (0.05 0.0506 -0.013)
      MovingPathPoint Movingpoint: skull (0.0747 0.05014 -0.0152) x_coordinate=lab_ad_duction
          y_coordinate=lab_ad_duction z_coordinate=lab_ad_duction
        x_location: SimmSpline: x=(-0.698132 0 0.698132) y=(0.0787 0.0747 0.0717)
        y_location: SimmSpline: x=(-0.698132 0.698132) y=(0.05014 0.05014)
        z_location: SimmSpline: x=(-0.698132 0 0.698132) y=(-0.0143 -0.0152 -0.0161)
      PathPoint muscle8-point4: leye (0.00884 0 0.00965)
      PathWrap: wrap_object=leye method=hybrid
    Millard2012EquilibriumMuscle lSR: max_isometric_force=1.17672 optimal_fiber_length=0.04517723
        tendon_slack_length=0.0054
      PathPoint muscle9-point1: skull (0.04824 0.0536 -0.014)
      MovingPathPoint Movingpoint: skull (0.0708 0.062 -0.028) x_coordinate=linfra_supra_duction
          y_coordinate=linfra_supra_duction z_coordinate=linfra_supra_duction
        x_location: SimmSpline: x=(-0.698132 0 0.698132) y=(0.0728 0.0708 0.0688)
        y_location: SimmSpline: x=(-0.698132 0 0.698132) y=(0.065 0.062 0.06)
        z_location: SimmSpline: x=(-0.698132 0 0.698132) y=(-0.028 -0.028 -0.028)
      PathPoint muscle9-point4: leye (0.00763 0.01048 0)
      PathWrap: wrap_object=leye method=hybrid
    Millard2012EquilibriumMuscle lIR: max_isometric_force=1.426773 optimal_fiber_length=0.04571768
        tendon_slack_length=0.0048
      PathPoint muscle10-point1: skull (0.04824 0.0476 -0.014)
      MovingPathPoint Movingpoint: skull (0.0758 0.03735 -0.0259) x_coordinate=linfra_supra_duction
          y_coordinate=linfra_supra_duction z_coordinate=linfra_supra_duction
        x_location: SimmSpline: x=(-0.698132 0 0.698132) y=(0.0708 0.0758 0.0798)
        y_location: SimmSpline: x=(-0.698132 0.698132) y=(0.0388 0.0359)
        z_location: SimmSpline: x=(-0.698132 0 0.698132) y=(-0.0274 -0.0259 -0.0244)
      PathPoint muscle10-point4: leye (0.00802 -0.01024 0)
      PathWrap: wrap_object=leye method=hybrid
    Millard2012EquilibriumMuscle lSO: max_isometric_force=0.603069 optimal_fiber_length=0.03982904
        tendon_slack_length=0.0265
      PathPoint muscle11-point_origin: skull (0.05 0.054 -0.013)
      PathPoint muscle11-point_trochlear: skull (0.08824 0.06225 -0.01473)
      PathPoint muscle11-point4: leye (-0.00441 0.01105 -0.0029)
      PathWrap: wrap_object=leye method=hybrid
    Millard2012EquilibriumMuscle lIO: max_isometric_force=0.558942 optimal_fiber_length=0.04147341
        tendon_slack_length=0.0015
      PathPoint muscle12-point1: skull (0.09134 0.03454 -0.0189)
      MovingPathPoint Movingpoint: skull (0.07282 0.0364 -0.03) x_coordinate=linfra_supra_duction
          y_coordinate=linfra_supra_duction z_coordinate=linfra_supra_duction
        x_location: SimmSpline: x=(-0.698132 0 0.698132) y=(0.07032 0.07282 0.07482)
        y_location: SimmSpline: x=(-0.698132 0 0.698132) y=(0.0357 0.0364 0.0371)
        z_location: SimmSpline: x=(-0.698132 0.698132) y=(-0.03 -0.03)
      PathPoint muscle12-point4: leye (-0.00718 0 -0.0087)
      PathWrap: wrap_object=leye method=hybrid
    CoordinateLimitForce [values shared by the 6 below unless stated]: upper_stiffness=5.8836e-5 [N*m/degree]
        upper_limit=0 [degrees] lower_stiffness=5.8836e-5 [N*m/degree] lower_limit=0 [degrees] damping=1e-6
        transition=0.01 [degrees] compute_dissipation_energy=false
    CoordinateLimitForce rabductionForce: coordinate=rab_ad_duction
    CoordinateLimitForce rsupraductionForce: coordinate=rinfra_supra_duction
    CoordinateLimitForce rtorsionForce: coordinate=rin_ex_cyclotorsion
    CoordinateLimitForce labductionForce: coordinate=lab_ad_duction
    CoordinateLimitForce lsupraductionForce: coordinate=linfra_supra_duction
    CoordinateLimitForce ltorsionForce: coordinate=lin_ex_cyclotorsion
  MarkerSet:
    Marker RPOG: reye (1 0 0)
    Marker LPOG: leye (1 0 0)
    Marker REye: reye (0 0 0)
    Marker LEye: leye (0 0 0)
    Marker Head: skull (0.12 0.05 -4.94898e-20)
